# OpenSim document version 30000
IKTaskSet:
  IKMarkerTask RASI: apply=true weight=10
  IKMarkerTask RPSI: apply=true weight=10
  IKMarkerTask LASI: apply=true weight=10
  IKMarkerTask LPSI: apply=true weight=10
  IKMarkerTask RMFC: apply=false weight=1
  IKMarkerTask RKNE: apply=true weight=5
  IKMarkerTask RHFB: apply=false weight=5
  IKMarkerTask RSHN: apply=true weight=5
  IKMarkerTask RMMA: apply=false weight=1
  IKMarkerTask RANK: apply=true weight=5
  IKMarkerTask RD5M: apply=true weight=5
  IKMarkerTask RD1M: apply=false weight=1
  IKMarkerTask RTOE: apply=true weight=5
  IKMarkerTask RHLX: apply=false weight=1
  IKMarkerTask RHEE: apply=true weight=5
  IKMarkerTask RCPG: apply=false weight=1
  IKMarkerTask RPCA: apply=false weight=1
  IKMarkerTask RSTL: apply=false weight=1
  IKMarkerTask RLCA: apply=false weight=1
  IKMarkerTask RP1M: apply=false weight=1
  IKMarkerTask RP5M: apply=false weight=1
