# OpenSim document version 30000
Model manual_LHDL_CT:
  credits: Luca Modenese
  length_units: meters
  force_units: N
  gravity: 0 -9.80665 0
  BodySet:
    Body ground: mass=0 mass_center=(0 0 0) inertia_xx=1 inertia_yy=1 inertia_zz=1
    Body pelvis: mass=13.09268 mass_center=(0.237777 0.250863 -0.371124) inertia_xx=0.09791833 inertia_yy=0.1427595
        inertia_zz=0.1369189 inertia_xy=-7.40433e-5 inertia_xz=0.001303098 inertia_yz=-0.003299664
        meshes=(manual_LHDL_CT_Geometries\pelvis.vtp manual_LHDL_CT_Geometries\pelvis_Neg_STL.vtp manual_LHDL_CT_Geometries\pelvis_STL_FIXED.vtp)
      CustomJoint ground_pelvis: parent_body=ground location_in_parent=(0 0 0)
          location=(0.2378792 0.1807324 -0.3606503) orientation=(2.579832 -1.561878 0.8525895)
        Coordinate pelvis_tilt: motion_type=rotational range=(-3.141593 3.141593)
        Coordinate pelvis_list: motion_type=rotational range=(-3.141593 3.141593)
        Coordinate pelvis_rotation: motion_type=rotational range=(-3.141593 3.141593)
        Coordinate pelvis_tx: motion_type=translational range=(-0.5 0.5)
        Coordinate pelvis_ty: motion_type=translational range=(-0.5 0.5)
        Coordinate pelvis_tz: motion_type=translational range=(-0.5 0.5)
        SpatialTransform:
          TransformAxis rotation1: coordinates=pelvis_tilt axis=(0 0 1) LinearFunction(coefficients=1 0)
          TransformAxis rotation2: coordinates=pelvis_list axis=(1 0 0) LinearFunction(coefficients=1 0)
          TransformAxis rotation3: coordinates=pelvis_rotation axis=(0 1 0) LinearFunction(coefficients=1 0)
          TransformAxis translation1: coordinates=pelvis_tx axis=(1 0 0) LinearFunction(coefficients=1 0)
          TransformAxis translation2: coordinates=pelvis_ty axis=(0 1 0) LinearFunction(coefficients=1 0)
          TransformAxis translation3: coordinates=pelvis_tz axis=(0 0 1) LinearFunction(coefficients=1 0)
    Body femur_r: mass=7.845869 mass_center=(0.121032 0.274766 -0.592758) inertia_xx=0.1248956 inertia_yy=0.1231612
        inertia_zz=0.02549157 inertia_xy=-0.001218896 inertia_xz=-0.009591829 inertia_yz=-0.003519396
        meshes=(manual_LHDL_CT_Geometries\femur_r.vtp manual_LHDL_CT_Geometries\femur_r_ST.vtp manual_LHDL_CT_Geometries\femur_r_Neg_STL.vtp)
      CustomJoint hip_r: parent_body=pelvis location_in_parent=(0.1436458 0.2432605 -0.4323557)
          orientation_in_parent=(2.580454 -1.561882 0.8532118) location=(0.1436458 0.2432605 -0.4323557)
          orientation=(-0.1642047 -1.515435 -1.857354)
        Coordinate hip_flexion_r: motion_type=rotational range=(-3.141593 3.141593)
        Coordinate hip_adduction_r: motion_type=rotational range=(-3.141593 3.141593)
        Coordinate hip_rotation_r: motion_type=rotational range=(-3.141593 3.141593)
        SpatialTransform: axes_held_at_zero=(translation1 translation2 translation3)
          TransformAxis rotation1: coordinates=hip_flexion_r axis=(0 0 1) LinearFunction(coefficients=1 0)
          TransformAxis rotation2: coordinates=hip_adduction_r axis=(1 0 0) LinearFunction(coefficients=1 0)
          TransformAxis rotation3: coordinates=hip_rotation_r axis=(0 1 0) LinearFunction(coefficients=1 0)
    Body tibia_r: mass=2.741839 mass_center=(0.118617 0.31013 -0.982003) inertia_xx=0.03363393 inertia_yy=0.03321381
        inertia_zz=0.003683923 inertia_xy=8.530134e-5 inertia_xz=-0.000486568 inertia_yz=-0.002749742
        meshes=(manual_LHDL_CT_Geometries\tibia_r.vtp manual_LHDL_CT_Geometries\tibia_r_Neg_STL.vtp manual_LHDL_CT_Geometries\tibia_r_ST.vtp manual_LHDL_CT_Geometries\patella_r.vtp)
      CustomJoint knee_r: parent_body=femur_r location_in_parent=(0.1223496 0.2923263 -0.8300069)
          orientation_in_parent=(-0.0703068 -1.48911 -1.763668) location=(0.1223496 0.2923263 -0.8300069)
          orientation=(-0.0703068 -1.48911 -1.668355)
        Coordinate knee_angle_r: motion_type=rotational range=(-3.141593 3.141593)
        SpatialTransform: axes_held_at_zero=(rotation2 rotation3 translation1 translation2 translation3)
          TransformAxis rotation1: coordinates=knee_angle_r axis=(0 0 1) LinearFunction(coefficients=1 0)
    Body talus_r: mass=0.05461466 mass_center=(0.120719 0.297803 -1.23419) inertia_xx=1.352751e-5
        inertia_yy=9.801137e-6 inertia_zz=1.342598e-5 inertia_xy=1.247486e-6 inertia_xz=1.056943e-6
        inertia_yz=2.876937e-6 meshes=manual_LHDL_CT_Geometries\talus_r.vtp
      CustomJoint ankle_r: parent_body=tibia_r location_in_parent=(0.1229897 0.303239 -1.23535)
          orientation_in_parent=(-1.725421 -0.8715205 3.001012) location=(0.1229897 0.303239 -1.23535)
          orientation=(-1.725421 -0.8715205 2.443383)
        Coordinate ankle_angle_r: motion_type=rotational range=(-3.141593 3.141593)
        SpatialTransform: axes_held_at_zero=(rotation2 rotation3 translation1 translation2 translation3)
          TransformAxis rotation1: coordinates=ankle_angle_r axis=(0 0 1) LinearFunction(coefficients=1 0)
    Body calcn_r: mass=0.841432 mass_center=(0.118944 0.291588 -1.28402) inertia_xx=0.002507224 inertia_yy=0.001506199
        inertia_zz=0.001705255 inertia_xy=0.0003282816 inertia_xz=0.0002537776 inertia_yz=0.0008483436
        meshes=(manual_LHDL_CT_Geometries\calcn_r.vtp manual_LHDL_CT_Geometries\calcn_r_ST.vtp manual_LHDL_CT_Geometries\calcn_r_Neg_ST.vtp)
      CustomJoint subtalar_r: parent_body=talus_r location_in_parent=(0.1324253 0.3245701 -1.254955)
          orientation_in_parent=(1.309423 -0.3257941 -0.0882119) location=(0.1324253 0.3245701 -1.254955)
          orientation=(1.309423 -0.3257941 -0.0882119)
        Coordinate subtalar_angle_r: motion_type=rotational range=(-3.141593 3.141593)
        SpatialTransform: axes_held_at_zero=(rotation2 rotation3 translation1 translation2 translation3)
          TransformAxis rotation1: coordinates=subtalar_angle_r axis=(0 0 1) LinearFunction(coefficients=1 0)
    Body toes_r: mass=0.02069324 mass_center=(0.103301 0.195107 -1.34745) inertia_xx=9.106757e-6 inertia_yy=6.181864e-6
        inertia_zz=1.440713e-5 inertia_xy=-2.873646e-6 inertia_xz=4.598281e-7 inertia_yz=7.590087e-7
        meshes=manual_LHDL_CT_Geometries\toes_r.vtp
      CustomJoint mtp_r: parent_body=calcn_r location_in_parent=(0.1040872 0.2255374 -1.344125)
          orientation_in_parent=(-1.700674 -0.7948129 2.536018) location=(0.1040872 0.2255374 -1.344125)
          orientation=(-1.700674 -0.7948129 2.536018)
        Coordinate mtp_angle_r: motion_type=rotational range=(-3.141593 3.141593)
        SpatialTransform: axes_held_at_zero=(rotation2 rotation3 translation1 translation2 translation3)
          TransformAxis rotation1: coordinates=mtp_angle_r axis=(0 0 1) LinearFunction(coefficients=1 0)
